// COMSOL Multiphysics 5.4.0.295 model "linear.mph"
// Outline of the model tree

Parameters
  W = 5.2[m]
  H = 3.6[m]
  wid = 0.5[m]
  wid_C = 0.25[m]
  a = 0.01644
  b = 6.248
  c = -2.147
  d = -0.05237
  Ip1 = 0
  Is1 = 0
  Ip2 = 0
  Is2 = 0
  Ip3 = 0
  Is3 = 0
  Np = 143
  Ns = 484

Functions
  pw1: Piecewise "Vs2" | funcname = Vs2; pieces = {{0, 5.56, 0}, {5.56, 100, 130e3*sqrt(2)}}; argunit = ms; fununit = V
  pw2: Piecewise "Vs3" | funcname = Vs3; pieces = {{0, 11.11, 0}, {11.11, 100, 130e3*sqrt(2)}}; argunit = ms; fununit = V

Probes
  pdom1: DomainPoint "Domain Point Probe 1" | coords = {0.25, 1.3}
    ppb1: PointExpr "Point Probe Expression 1"
      expr = mf.Az
      unit = Wb/m
      descr = Magnetic vector potential, z component
      table = tbl2

Geometry
  geom1 "Geometry 1" (2D, length unit m)
    r1: Rectangle | base = center; size = {W, H}
    r2: Rectangle | pos = {-(W-3*wid)/4-wid/2, 0}; base = center; size = {(W-3*wid)/2, H-wid*2}
    r3: Rectangle | pos = {(W-3*wid)/4+wid/2, 0}; base = center; size = {(W-3*wid)/2, H-wid*2}
    r4: Rectangle (disabled) | pos = {-W/2-wid_C/2, 0}; base = center; size = {wid_C, 2}
    r5: Rectangle (disabled) | pos = {-W/2-wid_C/2-wid_C, 0}; base = center; size = {wid_C, 2}
    r6: Rectangle (disabled) | pos = {-W/2+wid_C/2+wid, 0}; base = center; size = {wid_C, 2}
    r7: Rectangle (disabled) | pos = {-W/2+wid_C/2+wid+wid_C, 0}; base = center; size = {wid_C, 2}
    r8: Rectangle | pos = {-wid_C/2-wid/2, 0}; base = center; size = {wid_C, 2}
    r9: Rectangle | pos = {-wid_C/2-wid_C-wid/2, 0}; base = center; size = {wid_C, 2}
    r10: Rectangle | pos = {wid_C/2+wid-wid/2, 0}; base = center; size = {wid_C, 2}
    r11: Rectangle | pos = {wid_C/2+wid+wid_C-wid/2, 0}; base = center; size = {wid_C, 2}
    r12: Rectangle (disabled) | pos = {W/2+wid_C/2, 0}; base = center; size = {wid_C, 2}
    r13: Rectangle (disabled) | pos = {W/2+wid_C/2+wid_C, 0}; base = center; size = {wid_C, 2}
    r14: Rectangle (disabled) | pos = {W/2-wid_C/2-wid, 0}; base = center; size = {wid_C, 2}
    r15: Rectangle (disabled) | pos = {W/2-wid_C/2-wid-wid_C, 0}; base = center; size = {wid_C, 2}
    r16: Rectangle | base = center; size = {7, 5}
    fin: Finalize "Form Union"

Materials
  mat2: Common "Soft Iron (with losses)" on domains 1-8
    def "Basic"
      electricconductivity = 0[S/m]
      relpermittivity = 1
    HBCurve
      normH = HB(normB[1/T])[A/m]
      normB = sqrt(B1^2+B2^2+B3^2)
      pw2: Piecewise | funcname = HB; extrap = interior; pieces = {{0, 0.6, 500*x}, {0.6, 20, 500*x+3000*(x-0.6)^3}, {, , }}
  mat3: Common "Air" (disabled) on all domains
    def "Basic"
      thermalexpansioncoefficient = alpha_p(pA,T)
      molarmass = 0.02897
      bulkviscosity = muB(T)
      relpermeability = 1
      relpermittivity = 1
      dynamicviscosity = eta(T)
      ratioofspecificheat = 1.4
      electricconductivity = 0[S/m]
      heatcapacity = Cp(T)
      density = rho(pA,T)
      thermalconductivity = k(T)
      soundspeed = cs(T)
      eta: Piecewise | arg = T; pieces = {200.0, 1600.0, -8.38278E-7+8.35717342E-8*T^1-7.69429583E-11*T^2+4.6437266E-14*T^3-1.06585607E-17*T^4}; argunit = K; fununit = Pa*s
      Cp: Piecewise | arg = T; pieces = {200.0, 1600.0, 1047.63657-0.372589265*T^1+9.45304214E-4*T^2-6.02409443E-7*T^3+1.2858961E-10*T^4}; argunit = K; fununit = J/(kg*K)
      rho: Analytic | expr = pA*0.02897/R_const[K*mol/J]/T; args = {pA, T}; dermethod = manual; argders = {{pA, d(pA*0.02897/R_const/T,pA)}, {T, d(pA*0.02897/R_const/T,T)}}; argunit = Pa,K; fununit = kg/m^3
      k: Piecewise | arg = T; pieces = {200.0, 1600.0, -0.00227583562+1.15480022E-4*T^1-7.90252856E-8*T^2+4.11702505E-11*T^3-7.43864331E-15*T^4}; argunit = K; fununit = W/(m*K)
      cs: Analytic | expr = sqrt(1.4*R_const[K*mol/J]/0.02897*T); args = T; dermethod = manual; argunit = K; fununit = m/s
      an1: Analytic | funcname = alpha_p; expr = -1/rho(pA,T)*d(rho(pA,T),T); args = {pA, T}; argunit = Pa,K; fununit = 1/K
      an2: Analytic "Analytic 2a" | funcname = muB; expr = 0.6*eta(T); args = T; argunit = K; fununit = Pa*s
    RefractiveIndex
      n = 1
      ki = 0
    NonlinearModel
      BA = (def.gamma+1)/2
  mat4: Common "Air 1" on all domains
    // same settings as mat3

Physics
  mf: InductionCurrents "Magnetic Fields" on all domains
    dependent variable A = {Ax, Ay, Az}
    ShapeProperty.order_magneticvectorpotential = 1
    al1: AmperesLaw "Ampère's Law 1" (default)
    mi1: MagneticInsulation (default)
    init1: init "Initial Values 1" (default)
    al2: AmperesLaw "Ampère's Law 2" (disabled) on domains 1-8 | ConstitutiveRelationH = HBCurve
    mtcd1: Coil "Multi-Turn Coil 1" (disabled) on no domains
      CoilExcitation = Current
      coilGroup = 1
      N = 810
      sigmaCoil = 0
      ICoil = Is1
    mtcd2: Coil "Multi-Turn Coil 2" (disabled) on no domains
      CoilExcitation = Current
      N = 390
      sigmaCoil = 0
      ICoil = -Ip1
    mtcd3: Coil "Multi-Turn Coil 3" (disabled) on no domains
      CoilExcitation = Current
      N = 390
      sigmaCoil = 0
      ICoil = Ip1
    mtcd4: Coil "Multi-Turn Coil 4" (disabled) on no domains
      CoilExcitation = Current
      N = 810
      sigmaCoil = 0
      ICoil = -Is1
    mtcd5: Coil "Multi-Turn Coil 5" (disabled) on domains 4
      CoilExcitation = CircuitCurrent
      N = Ns
      sigmaCoil = 6e15
      ICoil = Is2
    mtcd6: Coil "Multi-Turn Coil 6" (disabled) on domains 5
      CoilExcitation = CircuitCurrent
      N = Np
      sigmaCoil = 6e15
      ICoil = -Ip2
    mtcd7: Coil "Multi-Turn Coil 7" (disabled) on domains 7
      CoilExcitation = CircuitCurrent
      N = Np
      sigmaCoil = 6e15
      ICoil = Ip2
    mtcd8: Coil "Multi-Turn Coil 8" (disabled) on domains 8
      CoilExcitation = CircuitCurrent
      N = Ns
      sigmaCoil = 6e15
      ICoil = -Is2
    mtcd9: Coil "Multi-Turn Coil 9" (disabled) on no domains
      CoilExcitation = Current
      N = 810
      sigmaCoil = 0
      ICoil = Is3
    mtcd10: Coil "Multi-Turn Coil 10" (disabled) on no domains
      CoilExcitation = Current
      N = 390
      sigmaCoil = 0
      ICoil = -Ip3
    mtcd11: Coil "Multi-Turn Coil 11" (disabled) on no domains
      CoilExcitation = Current
      N = 390
      sigmaCoil = 0
      ICoil = Ip3
    mtcd12: Coil "Multi-Turn Coil 12" (disabled) on no domains
      CoilExcitation = Current
      N = 810
      sigmaCoil = 0
      ICoil = -Is3
    mp1: MagneticPotential on boundaries 1-3, 32
    ecd1: ExternalCurrentDensity on domains 5 | Je = {0, 0, 1e6}
    ecd2: ExternalCurrentDensity on domains 7 | Je = {0, 0, -1e6}

Mesh
  mesh1 "Mesh 1"
    size: MeshSizeDefault | hmax = 0.08; custom = on
    ftri1: FreeTri "Free Triangular 1" on remaining entities

Studies
  std1 "Study 1"
    stat: Stationary

Solver configurations
  sol1 "Solution 1" (study std1)
    v1: Variables "Dependent Variables 1"
    s1: Stationary "Stationary Solver 1"
      dDef: Direct | errorchk = on; nliniterrefine = on
      fc1: FullyCoupled | linsolver = dDef; ntermauto = itertol; niter = 10; termonres = on

Datasets
  pw2_ds1: Grid1D "Grid 1D 1a"
  pw2_ds2: Grid1D "Grid 1D 2a"
  pw2_ds3: Grid1D "Grid 1D 3a"
  dset1: Solution | solution = sol1
  dset2: Solution "Probe Solution 2" | solution = sol1
  cpt1: CutPoint2D "Domain Point Probe 1" | data = dset2; pointx = 0.25; pointy = 1.3

Derived values
  par1: Particle "Particle Evaluation 1" | expr = comp1.mf.Az
  pev1: EvalPoint "Point Probe Expression 1" | data = cpt1; table = tbl2; expr = mf.Az

Tables
  tbl1: Table
    // Point Evaluation 1 (mf.normB)
    Time (ms) | Magnetic flux density norm (T), Point: 38 | Magnetic vector potential, z component (Wb/m), Point: 38
    0 | 0.212231 | 0.419148
    0.5 | 0.212231 | 0.419141
    1 | 0.212231 | 0.419141
    1.5 | 0.212231 | 0.419141
    2 | 0.212231 | 0.419141
    2.5 | 0.212231 | 0.419141
    3 | 0.212231 | 0.419141
    3.5 | 0.212231 | 0.419141
    4 | 0.212231 | 0.419141
    4.5 | 0.212231 | 0.419141
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  tbl2: Table "Probe Table 2"
    Magnetic vector potential, z component (Wb/m), Point: (0.25, 1.3)
    -0.0150932

Plots
  pg6: PlotGroup1D "1D Plot Group 6" | data = pw2_ds1; title = HB(x)
    plot1: LineGraph | expr = comp1.mat2.HBCurve.HB(root.x)
    plot2: LineGraph "Left Extrapolation" | data = pw2_ds2; expr = comp1.mat2.HBCurve.HB(root.x)
    plot3: LineGraph "Right Extrapolation" | data = pw2_ds3; expr = comp1.mat2.HBCurve.HB(root.x)
  pg7: PlotGroup2D "Magnetic Flux Density Norm (mf)" | data = dset1
    surf1: Surface | expr = mf.normB
    con1: Contour | expr = mf.Az
  pg8: PlotGroup1D "Probe Plot Group 8"
    tblp1: Table "Probe Table Graph 1" | table = tbl2; xaxisdata = auto; plotcolumns = 1

Exports
  mesh1: Mesh | data = dset1; filename = D:\Backup\jiacong\2ndbdrynddr\casestudy\MeshInfo.mphtxt; typedefault = mphascii
  data1: Data | data = dset1; expr = mf.Az; filename = D:\Backup\jiacong\2ndbdrynddr\casestudy\Untitled.txt