// COMSOL Multiphysics 5.3.0.248 model "Untitled2.mph"
// Outline of the model tree

Probes
  pdom1: DomainPoint "Domain Point Probe 1" | coords = {-0.913765306175, -0.909820822977}
    ppb1: PointExpr "Point Probe Expression 1"
      expr = mf.Az
      unit = Wb/m
      descr = Magnetic vector potential, z component
      table = tbl1

Geometry
  geom1 "Geometry 1" (2D, length unit m)
    sq1: Square | base = center; size = 2
    fin: Finalize "Form Union"

Materials
  mat1: Common "Material 1" on domains 1
    def "Basic"
      relpermeability = 2/1.256637e-6
      electricconductivity = 1
      relpermittivity = 1
  mat3: Common "Soft Iron (with losses) 1" on domains 1
    def "Basic"
      electricconductivity = 1[S/m]
      relpermittivity = 1
    HBCurve
      normH = HB(normB[1/T])[A/m]
      normB = sqrt(B1^2+B2^2+B3^2)
      pw1: Piecewise | funcname = HB; extrap = interior; pieces = {{0, 0.6, 2*x}, {0.6, 4, 2*x+1e5*(x-0.6)^3}}

Physics
  mf: InductionCurrents "Magnetic Fields" on all domains
    dependent variable A = {Ax, Ay, Az}
    ShapeProperty.order_magneticvectorpotential = 1
    al1: AmperesLaw "Ampère's Law 1" (default) | ConstitutiveRelationH = HBCurve
    mi1: MagneticInsulation (default)
    init1: init "Initial Values 1" (default)
    ecd1: ExternalCurrentDensity on domains 1 | Je = {0, 0, 3.21}

Mesh
  mesh1 "Mesh 1" (physics-controlled)

Studies
  std1 "Study 1"
    time: Transient "Time Dependent" | tlist = range(0,0.01,0.15)

Solver configurations
  sol1 "Solution 1" (study std1)
    v1: Variables "Dependent Variables 1"
    t1: Time "Time-Dependent Solver 1" | tlist = range(0,0.01,0.15); tstepsbdf = manual; bdforder = 1
      dDef: Direct
      fc1: FullyCoupled | linsolver = dDef; dtech = auto

Datasets
  dset1: Solution | solution = sol1
  dset2: Solution "Probe Solution 2" | solution = sol1
  cpt1: CutPoint2D "Domain Point Probe 1" | data = dset2; pointx = -0.913765306175; pointy = -0.909820822977

Derived values
  pev1: EvalPoint "Point Probe Expression 1" | data = cpt1; table = tbl1; expr = mf.Az

Tables
  tbl1: Table "Probe Table 1"
    Time (s) | Magnetic vector potential, z component (Wb/m), Point: (-0.91377, -0.90982)
    0 | 9.79087e-08
    0.01 | 0.00840418
    0.02 | 0.0115415
    0.03 | 0.0133318
    0.04 | 0.0145682
    0.05 | 0.0155091
    0.06 | 0.0162667
    0.07 | 0.0168992
    0.08 | 0.0174405
    0.09 | 0.0179111
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
Plots
  pg2: PlotGroup1D "Probe Plot Group 2"
    tblp1: Table "Probe Table Graph 1" | table = tbl1; xaxisdata = auto; plotcolumns = 2
  pg3: PlotGroup2D "Magnetic Flux Density Norm (mf)" | data = dset1
    surf1: Surface | expr = mf.normB
    con1: Contour | expr = mf.Az