// COMSOL Multiphysics 5.3.0.248 model "transformer.mph"
// Outline of the model tree

Probes
  pdom1: DomainPoint "Domain Point Probe 1" | coords = {7.30693104125e-05, -0.00474202840178}
    ppb1: PointExpr "Point Probe Expression 1"
      expr = mf.Az
      unit = Wb/m
      descr = Magnetic vector potential, z component
      table = tbl1
  dom1: Domain "Domain Probe 1" on all domains
    type = maximum
    expr = mf.normB
    unit = T
    descr = Magnetic flux density norm
    table = tbl1

Geometry
  geom1 "Geometry 1" (2D, length unit m)
    imp1: Import
      type = native
      filename = F:\RTX\TLMpCG\2dtransgeo.mphtxt
      meshfilename = F:\RTX\TLMpCG\2dtransgeo.mphtxt
    fin: Finalize "Form Union"

Materials
  mat1: Common "Material 1" on all domains
    def "Basic"
      relpermeability = 1
      electricconductivity = 0
      relpermittivity = 1
  mat2: Common "Material 2" on domains 2
    def "Basic"
      relpermeability = 0.5/1.256637e-6
      electricconductivity = 0
      relpermittivity = 1
  mat3: Common "Soft Iron (with losses)" on domains 2
    def "Basic"
      electricconductivity = 1000[S/m]
      relpermittivity = 1
    HBCurve "HB"
      normH = HB(normB[1/T])[A/m]
      normB = sqrt(B1^2+B2^2+B3^2)
      pw1: Piecewise "HB" | funcname = HB; extrap = interior; pieces = {{0, 0.6, 800*x}, {0.6, 4, 800*x+1e5*(x-0.6)^3}}

Physics
  mf: InductionCurrents "Magnetic Fields" on all domains
    dependent variable A = {Ax, Ay, Az}
    ShapeProperty.order_magneticvectorpotential = 1
    al1: AmperesLaw "Ampère's Law 1" (default)
    mi1: MagneticInsulation (default)
    init1: init "Initial Values 1" (default)
    ecd1: ExternalCurrentDensity on domains 5 | Je = {0, 0, 40000*sin(60*2*pi*t)}
    ecd2: ExternalCurrentDensity on domains 7 | Je = {0, 0, -40000*sin(60*2*pi*t)}
    al2: AmperesLaw "Ampère's Law 2" on domains 2 | ConstitutiveRelationH = HBCurve

Mesh
  mesh1 "Mesh 1" (physics-controlled)

Studies
  std1 "Study 1"
    stat: Stationary
  std2 "Study 2"
    time: Transient "Time Dependent" | tlist = range(0,1/60/100,3/60/100); usertol = on; rtol = 1e-5

Solver configurations
  sol1 "Solution 1" (study std1)
    v1: Variables "Dependent Variables 1"
    s1: Stationary "Stationary Solver 1"
      dDef: Direct
      fc1: FullyCoupled | linsolver = dDef
  sol2 "Solution 2" (study std2)
    v1: Variables "Dependent Variables 1"
    t1: Time "Time-Dependent Solver 1"
      tlist = range(0,1/60/100,3/60/100)
      tstepsbdf = manual
      bdforder = 1
      timestepbdf = 1/60/100
      dDef: Direct
      fc1: FullyCoupled | linsolver = dDef; dtech = hnlin; maxiter = 20; damp = 0.9

Datasets
  dset1: Solution | solution = sol1
  dset2: Solution "Probe Solution 2" | solution = sol2
  cpt1: CutPoint2D "Domain Point Probe 1" | data = dset2; pointx = 7.30693104125e-05; pointy = -0.00474202840178
  dset3: Solution | solution = sol2
  dset4: Solution "Probe Solution 4" | solution = sol2
  max1: Maximum "Domain Probe 1" on domains 1-8 | data = dset4

Derived values
  pev1: EvalPoint "Point Probe Expression 1" | data = cpt1; table = tbl1; expr = mf.Az
  pev2: EvalPoint "Domain Probe 1" | data = max1; table = tbl1; expr = mf.normB

Tables
  tbl1: Table "Probe Table 1"
    Time (s) | Magnetic vector potential, z component (Wb/m), Point: (7.3069E-5, -0.004742) | Magnetic flux density norm (T), Domain Probe 1
    0 | 0 | 0
    0.000166667 | -3.79326e-07 | 0.00437566
    0.000333333 | -7.6773e-07 | 0.0119435
    0.0005 | -1.27807e-06 | 0.0222675

Plots
  pg1: PlotGroup2D "Magnetic Flux Density Norm (mf)" | data = dset3
    surf1: Surface | expr = mf.normB
    con1: Contour (disabled) | expr = mf.Az
  pg2: PlotGroup1D "Probe Plot Group 2"
    tblp1: Table "Probe Table Graph 1" | table = tbl1; xaxisdata = auto; plotcolumns = {2, 3}
  pg3: PlotGroup2D "Magnetic Flux Density Norm (mf) 1" | data = dset3
    surf1: Surface | expr = mf.normB
    con1: Contour | expr = mf.Az

Exports
  mesh1: Mesh | data = dset1; filename = F:\RTX\TLMpCG\TLMpCG\Untitled.mphtxt; typedefault = mphascii